// COMSOL Multiphysics 6.1.0.252 model "heat.mph"
// Outline of the model tree

Geometry
  geom1 "几何 1" (2D, length unit cm)
    pol1: Polygon "多边形 1" | source = table; table = {{-1, -1}, {-1, 1}, {1, 1}, {1, -1}, {-1, -1}}
    fin: Finalize "形成联合体"

Materials
  mat1: Common "Alumina" on all domains
    def "Basic"
      thermalexpansioncoefficient = 8e-6[1/K]
      heatcapacity = 900[J/(kg*K)]
      density = 3900[kg/m^3]
      thermalconductivity = 27[W/(m*K)]
    Enu "Young's modulus and Poisson's ratio"
      E = 300[GPa]
      nu = 0.222

Physics
  ht: HeatTransfer "固体传热" on all domains
    dependent variable T
    PhysicalModelProperty.Tref = 273.15[K]
    solid1: SolidHeatTransferModel "固体 1" (default)
    init1: init "初始值 1" (default) | Tinit = 273.15[K]
    ins1: ThermalInsulation "热绝缘 1" (default)
    temp1: TemperatureBoundary "温度 1" on boundaries 1 | T0 = 348.15[K]
    temp2: TemperatureBoundary "温度 2" on boundaries 2 | T0 = 323.15[K]
    temp3: TemperatureBoundary "温度 3" on boundaries 3 | T0 = 273.15[K]
    temp4: TemperatureBoundary "温度 4" on boundaries 4 | T0 = 273.15[K]

Mesh
  mesh1 "网格 1"
    size: MeshSizeDefault "大小" | hauto = 2
    fq1: FreeQuad "自由四边形网格 1" on entire geometry

Studies
  std1 "研究 1"
    stat: Stationary "稳态"

Solver configurations
  sol1 "解 1" (study std1)
    v1: Variables "因变量 1"
    s1: Stationary "稳态求解器 1"
      fc1: FullyCoupled "全耦合 1" | linsolver = d1; initstep = 0.01; minstep = 1.0E-6; maxiter = 50
      d1: Direct "直接，传热变量 (ht)" | linsolver = pardiso; pivotperturb = 1.0E-13

Datasets
  dset1: Solution | solution = sol1
  cln1: CutLine2D "y=0" | data = dset1; genpoints = {{-1, 0}, {1, 0}}
  cln2: CutLine2D "y=0.25" | data = dset1; genpoints = {{-1, 0.25}, {1, 0.25}}
  cln3: CutLine2D "y=0.5" | data = dset1; genpoints = {{-1, 0.5}, {1, 0.5}}
  cln4: CutLine2D "y=0.75" | data = dset1; genpoints = {{-1, 0.75}, {1, 0.75}}
  cln5: CutLine2D "y=1.0" | data = dset1; genpoints = {{-1, 1}, {1, 1}}

Tables
  tbl1: Table "表格 1"
    x 坐标 (cm) | 温度
    -1 | 75
    -0.986667 | 74.2707
    -0.973333 | 73.5418
    -0.96 | 72.8134
    -0.946667 | 72.0857
    -0.933333 | 71.3592
    -0.92 | 70.6339
    -0.906667 | 69.9101
    -0.893333 | 69.1883
    -0.88 | 68.4684
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  tbl2: Table "表格 2"
    x 坐标 (cm) | 温度
    -1 | 75
    -0.99 | 74.3131
    -0.986667 | 74.0842
    -0.976667 | 73.3979
    -0.973333 | 73.1692
    -0.963333 | 72.4835
    -0.96 | 72.255
    -0.95 | 71.5704
    -0.946667 | 71.3425
    -0.936667 | 70.6597
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  tbl3: Table "表格 3"
    x 坐标 (cm) | 温度
    -1 | 75
    -0.993333 | 74.3406
    -0.986667 | 73.6819
    -0.98 | 73.0239
    -0.973333 | 72.3666
    -0.966667 | 71.7099
    -0.96 | 71.0539
    -0.953333 | 70.3992
    -0.946667 | 69.7466
    -0.94 | 69.0959
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  tbl4: Table "表格 4"
    x 坐标 (cm) | 温度
    -1 | 75
    -0.996667 | 74.3556
    -0.986667 | 72.4306
    -0.983333 | 71.7915
    -0.973333 | 69.8825
    -0.97 | 69.2488
    -0.96 | 67.3557
    -0.956667 | 66.729
    -0.946667 | 64.8708
    -0.943333 | 64.2586
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  tbl5: Table "表格 5"
    x 坐标 (cm) | 温度
    -1 | 37.5
    -0.986667 | 8.33333
    -0.973333 | -4.16667
    -0.96 | 0
    -0.946667 | 5.68434e-14
    -0.933333 | 0
    -0.92 | 0
    -0.906667 | 0
    -0.893333 | 0
    -0.88 | 0
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
Plots
  pg1: PlotGroup2D "温度 (ht)" | data = dset1
    surf1: Surface "表面" | expr = T; unit = degC; bandcount = 20
  pg2: PlotGroup2D "等温线 (ht)" | data = dset1; plotarrayenable = on
    con1: Contour "等值线" | expr = T; unit = degC; levels = 30; levelrounding = off
  pg3: PlotGroup1D "一维绘图组 3" | data = dset1; xlabel = x 坐标 (cm); ylabel = 温度 (degC)
    lngr1: LineGraph "y=0" | data = cln1; expr = T; unit = degC; xdata = expr; xdataexpr = x; legends = 0
    lngr2: LineGraph "y=0.25" | data = cln2; expr = T; unit = degC; xdata = expr; xdataexpr = x; legends = 0.25
    lngr3: LineGraph "y=0.5" | data = cln3; expr = T; unit = degC; xdata = expr; xdataexpr = x; legends = 0.5
    lngr4: LineGraph "y=0.75" | data = cln4; expr = T; unit = degC; xdata = expr; xdataexpr = x; legends = 0.75

Exports
  data1: Data "数据 1" | data = dset1; expr = T
  plot1: Plot "绘图 1"
  data2: Data "数据 2" | data = dset1; expr = T
  plot2: Plot "绘图 2"
  img1: Image "图像 1" | size = current; unit = px; width = 800; height = 600